<?xml version="1.0" encoding="UTF-8"?>

<!-- ########################################

 # DR400-jsbSim by PAF team
 # April 2012 : Modified by PAF team
 # http://equipe-flightgear.forumactif.com

##########################################-->

<!-- Generated by Aero-Matic v 0.8

     Inputs:
                horsepower: 118
                     pitch: fixed
            max engine rpm: 2550
        prop diameter (ft): 6.562

     Outputs:
              max prop rpm:2859.34
                gear ratio:   0.89
                       Cp0:0.020726
                       Ct0:0.017824
       static thrust (lbs): 178.48
-->

<propeller name="prop">
  <ixx> 1.6 </ixx>
  <diameter unit="IN"> 78.7 </diameter>
  <numblades> 2 </numblades>
  <gearratio>0.89 </gearratio>

  <table name="C_THRUST" type="internal">
     <tableData>
       0.0  0.0178
       0.1  0.0171
       0.2  0.0163
       0.3  0.0150
       0.4  0.0135
       0.5  0.0119
       0.6  0.0096
       0.7  0.0073
       0.8  0.0040
       1.0  -0.0013
       1.2  -0.0070
       1.4  -0.0126
     </tableData>
  </table>


  <table name="C_POWER" type="internal">
     <tableData>
       0.0  0.0207
       0.1  0.0207
       0.2  0.0202
       0.3  0.0198
       0.4  0.0186
       0.5  0.0171
       0.6  0.0156
       0.7  0.0131
       0.8  0.0107
       1.0  0.0038
       1.2  -0.0061
       1.4  -0.0184
       1.6  -0.0313
     </tableData>
  </table>

</propeller>
